# Fast parallel packer for RCFX Rung data (uses LIGGGHTS 3.8 MPI)
atom_style granular
atom_modify map array
boundary p p p
newton off
communicate single vel yes

region box block 0 0.065 0 0.065 0 0.065 units box
create_box 2 box

neighbor 0.0005 bin
neigh_modify delay 0 every 1 check yes

# Material properties (same as production inputs)
fix m1 all property/global youngsModulus peratomtype 1e8 2.1e11
fix m2 all property/global poissonsRatio peratomtype 0.25 0.29
fix m3 all property/global coefficientRestitution peratomtypepair 2 0.3 0.35 0.35 0.45
fix m4 all property/global coefficientFriction peratomtypepair 2 0.55 0.45 0.45 0.35
fix m5 all property/global coefficientRollingFriction peratomtypepair 2 0.08 0.04 0.04 0.025

pair_style gran model hertz tangential history
pair_coeff * *

fix grav all gravity 1.625 vector 0.0 0.0 -1.0

# Distributions
fix pts_reg all particletemplate/sphere 12345 atom_type 1 density constant 3100 radius constant 0.00015
fix pts_coarse all particletemplate/sphere 12346 atom_type 1 density constant 3100 radius constant 0.00012
fix pts_iron all particletemplate/sphere 12347 atom_type 2 density constant 7870 radius constant 0.002

fix pdd_reg all particledistribution/discrete 54321 2 pts_reg 0.65 pts_coarse 0.35
fix pdd_iron all particledistribution/discrete 54322 1 pts_iron 1.0

# Parallel insertion (this is what makes it fast)
fix ins_reg all insert/pack seed 98765 distributiontemplate pdd_reg &
    maxattempt 200 insert_every 2000 overlapcheck yes all_in yes &
    region box particles_in_region 74100 ntry_mc 100000

fix ins_iron all insert/pack seed 98766 distributiontemplate pdd_iron &
    maxattempt 200 insert_every 5000 overlapcheck yes all_in yes &
    region box particles_in_region 900 ntry_mc 50000

fix integr all nve/sphere

thermo 1000
thermo_style custom step atoms ke cpu

# Relax a bit after insertion
run 50000

write_restart data/rung2_first_real_packed.restart

# Also write a data file (for convenience)
write_data data/rung2_first_real.data

print "Packed data written to data/rung2_first_real.data"
