# RCFX Rung 2 ready input for LIGGGHTS 3.8.0 (sjkr cohesion)
atom_style granular
atom_modify map array
boundary p p p
newton off
communicate single vel yes
read_data data/rung2_quick.data   # generated with ./quick_start_data.sh
neighbor 0.0 nsq
neigh_modify delay 0 every 1 check yes
fix m1 all property/global youngsModulus peratomtype 1e8 2.1e11
fix m2 all property/global poissonsRatio peratomtype 0.25 0.29
fix m3 all property/global coefficientRestitution peratomtypepair 2 0.3 0.4 0.4 0.5
fix m4 all property/global coefficientFriction peratomtypepair 2 0.6 0.5 0.5 0.4
fix m5 all property/global coefficientRollingFriction peratomtypepair 2 0.1 0.05 0.05 0.03
fix m6 all property/global cohesionEnergyDensity peratomtypepair 2 2.0e-19 0.0 0.0 0.0
pair_style gran model hertz tangential history cohesion sjkr
pair_coeff * *
fix grav all gravity 1.625 vector 0.0 0.0 -1.0
fix integr all nve/sphere
thermo 500
thermo_style custom step atoms ke cpu
run 1000
dump dmp all custom 500 post/dump.rung2_sjkr id type x y z vx vy vz radius mass
run 2000
